Simulations: Version=186
  Soil SoilType =  silty clay loam: SoilType=SoilType =  silty clay loam; State=IOWA,MARSHALL; Country=USA; ApsoilNumber=0; Latitude=42; Longitude=-93
    DataSource=Original source is www.isric.org. See: https://www.isric.org/explore/soilgrids/faq-soilgrids  2025-01-08 13:36:15.451816
    Comments=resolution = 250m - taxonomic classification name = silty clay loam - drainage class = NA - elevation = NA - slope = NA - geomdesc = NA
    Water: Thickness=[50, 100, 150, 300, 400, 1000]; InitialValues=[0.3087, 0.3078, 0.3087, 0.3087, 0.3024, 0.2943]; InitialPAWmm=221.59; RelativeTo=LL15; FilledFromTop=true
    Physical
      Thickness  ParticleSizeSand  ParticleSizeSilt  ParticleSizeClay  Rocks  BD    AirDry  LL15   DUL    SAT    KS
      50         7.3               58.2              34.5              0      1.41  0.0965  0.193  0.343  0.41   87.2267
      100        7.2               57.9              34.9              0      1.52  0.194   0.194  0.342  0.405  72.7664
      150        6.9               57.4              35.7              0      1.5   0.195   0.195  0.343  0.405  69.4086
      300        6.8               57.6              35.6              0      1.55  0.193   0.193  0.343  0.392  35.7672
      400        7.5               56.8              35.7              0      1.62  0.189   0.189  0.336  0.383  31.771
      1000       10.3              52.1              37.6              0      1.63  0.187   0.187  0.327  0.373  29.4871
      Rocks source: Calculated
      SoilCrop WheatSoil
        LL=[0.193, 0.194, 0.195, 0.193, 0.189, 0.187]
        KL=[0.06, 0.0491238, 0.0402192, 0.0329287, 0.0269597, 0.0220728]
        XF=[1, 1, 1, 1, 1, 1]
    WaterBalance SoilWater: SummerDate=1-nov; SummerU=6; SummerCona=6; WinterDate=1-apr; WinterU=4; WinterCona=2.5; DiffusConst=27634.79; DiffusSlope=-13.05; Salb=0.12; CN2Bare=73; CNRed=20; CNCov=0; DischargeWidth=5; CatchmentArea=10; PSIDul=-100; Thickness=[50, 100, 150, 300, 400, 1000]; SWCON=[0.5, 0.5, 0.5, 0.5, 0.5, 0.5]
    CERESSoilTemperature Temperature
    Solute NO3: Thickness=[50, 100, 150, 300, 400, 1000]; InitialValues=[0.5, 0.495025, 0.490099, 0.485223, 0.480395, 0.475615]; InitialValuesUnits=ppm; WaterTableConcentration=0; D0=0; DepthConstant=0; MaxDepthSoluteAccessible=0; RunoffEffectivenessAtMovingSolute=0; MaxEffectiveRunoff=0
    Solute NH4: Thickness=[50, 100, 150, 300, 400, 1000]; InitialValuesUnits=ppm; WaterTableConcentration=0; D0=0; DepthConstant=0; MaxDepthSoluteAccessible=0; RunoffEffectivenessAtMovingSolute=0; MaxEffectiveRunoff=0
      InitialValues=[0.05, 0.0495025, 0.0490099, 0.0485223, 0.0480395, 0.0475615]
    Solute Urea: Thickness=[150, 150, 150, 150, 200, 200, 200, 200, 300, 300]; InitialValues=[0, 0, 0, 0, 0, 0, 0, 0, 0, 0]; InitialValuesUnits=kg/ha; WaterTableConcentration=0; D0=0; DepthConstant=0; MaxDepthSoluteAccessible=0; RunoffEffectivenessAtMovingSolute=0; MaxEffectiveRunoff=0
    Organic: FOMCNRatio=40; CarbonUnits=Total
      Thickness  Carbon  SoilCNRatio  FBiom      FInert    FOM
      50         2.76    12           0.04       0.8       150
      100        2.13    12           0.0327492  0.80804   122.81
      150        1.38    12           0.0268128  0.816161  100.548
      300        0.81    12           0.0219525  0.824364  82.3217
      400        0.35    12           0.0179732  0.832649  67.3993
      1000       0.17    12           0.0147152  0.841017  55.1819
    Chemical: Thickness=[50, 100, 150, 300, 400, 1000]; PH=[6.3, 6.2, 6.3, 6.3, 6.4, 7]; PHUnits=Water
    Nutrient
  DataStore
